/BATCH
/FILNAME,stage10_contact
/TITLE,Stage 10 contact-control verification
/PREP7
ET,1,182
KEYOPT,1,3,2
ET,2,169
ET,3,172
KEYOPT,3,2,4
KEYOPT,3,4,0
KEYOPT,3,10,1
R,1,1
R,3,0,0,1,0.1,0,2
MP,EX,1,2000
MP,PRXY,1,0.3
MP,ALPX,1,0.0001
MP,MU,1,0
TYPE,1
REAL,1
MAT,1
N,1,0,0,0
N,2,0.1666666666666667,0,0
N,3,0.3333333333333333,0,0
N,4,0.5,0,0
N,5,0.6666666666666666,0,0
N,6,0.8333333333333334,0,0
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N,1525,10,4,0
E,1,2,63,62
E,2,3,64,63
E,3,4,65,64
E,4,5,66,65
E,5,6,67,66
E,6,7,68,67
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E,1463,1464,1525,1524
D,1,UY,0
D,2,UY,0
D,3,UY,0
D,4,UY,0
D,5,UY,0
D,6,UY,0
D,7,UY,0
D,8,UY,0
D,9,UY,0
D,10,UY,0
D,11,UY,0
D,12,UY,0
D,13,UY,0
D,14,UY,0
D,15,UY,0
D,16,UY,0
D,17,UY,0
D,18,UY,0
D,19,UY,0
D,20,UY,0
D,21,UY,0
D,22,UY,0
D,23,UY,0
D,24,UY,0
D,25,UY,0
D,26,UY,0
D,27,UY,0
D,28,UY,0
D,29,UY,0
D,30,UY,0
D,31,UY,0
D,32,UY,0
D,33,UY,0
D,34,UY,0
D,35,UY,0
D,36,UY,0
D,37,UY,0
D,38,UY,0
D,39,UY,0
D,40,UY,0
D,41,UY,0
D,42,UY,0
D,43,UY,0
D,44,UY,0
D,45,UY,0
D,46,UY,0
D,47,UY,0
D,48,UY,0
D,49,UY,0
D,50,UY,0
D,51,UY,0
D,52,UY,0
D,53,UY,0
D,54,UY,0
D,55,UY,0
D,56,UY,0
D,57,UY,0
D,58,UY,0
D,59,UY,0
D,60,UY,0
D,61,UY,0
D,1,UX,0
N,900001,0,4.02,0
N,900002,10,4.02,0
D,900001,ALL,0
D,900002,ALL,0
TYPE,2
REAL,3
MAT,1
E,900001,900002
TYPE,3
REAL,3
MAT,1
E,1466,1465
E,1467,1466
E,1468,1467
E,1469,1468
E,1470,1469
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E,1525,1524
ALLSEL,ALL
FINISH
/SOLU
ANTYPE,STATIC
NLGEOM,ON
AUTOTS,ON
KBC,0
NROPT,FULL
OUTRES,ALL,LAST
TREF,20
NSEL,S,NODE,,1,1525
BF,ALL,TEMP,120
ALLSEL,ALL
TIME,1
NSUBST,20,200,5
SOLVE
FINISH
/POST1
SET,LAST
ETABLE,CPRES,CONT,PRES
ETABLE,PENE,CONT,PENE
ETABLE,CSTAT,CONT,STAT
ETABLE,CSFRIC,CONT,SFRIC
*CFOPEN,contact_values,csv
EIDV=1442
XV=0.08333333333333333
*GET,PV,ELEM,1442,ETAB,CPRES
*GET,PENV,ELEM,1442,ETAB,PENE
*GET,STATV,ELEM,1442,ETAB,CSTAT
*GET,FRICV,ELEM,1442,ETAB,CSFRIC
*VWRITE,EIDV,XV,PV,PENV,STATV,FRICV
(6(E24.16,','))
EIDV=1443
XV=0.25
*GET,PV,ELEM,1443,ETAB,CPRES
*GET,PENV,ELEM,1443,ETAB,PENE
*GET,STATV,ELEM,1443,ETAB,CSTAT
*GET,FRICV,ELEM,1443,ETAB,CSFRIC
*VWRITE,EIDV,XV,PV,PENV,STATV,FRICV
(6(E24.16,','))
EIDV=1444
XV=0.4166666666666667
*GET,PV,ELEM,1444,ETAB,CPRES
*GET,PENV,ELEM,1444,ETAB,PENE
*GET,STATV,ELEM,1444,ETAB,CSTAT
*GET,FRICV,ELEM,1444,ETAB,CSFRIC
*VWRITE,EIDV,XV,PV,PENV,STATV,FRICV
(6(E24.16,','))
EIDV=1445
XV=0.5833333333333334
*GET,PV,ELEM,1445,ETAB,CPRES
*GET,PENV,ELEM,1445,ETAB,PENE
*GET,STATV,ELEM,1445,ETAB,CSTAT
*GET,FRICV,ELEM,1445,ETAB,CSFRIC
*VWRITE,EIDV,XV,PV,PENV,STATV,FRICV
(6(E24.16,','))
EIDV=1446
XV=0.75
*GET,PV,ELEM,1446,ETAB,CPRES
*GET,PENV,ELEM,1446,ETAB,PENE
*GET,STATV,ELEM,1446,ETAB,CSTAT
*GET,FRICV,ELEM,1446,ETAB,CSFRIC
*VWRITE,EIDV,XV,PV,PENV,STATV,FRICV
(6(E24.16,','))
EIDV=1447
XV=0.9166666666666666
*GET,PV,ELEM,1447,ETAB,CPRES
*GET,PENV,ELEM,1447,ETAB,PENE
*GET,STATV,ELEM,1447,ETAB,CSTAT
*GET,FRICV,ELEM,1447,ETAB,CSFRIC
*VWRITE,EIDV,XV,PV,PENV,STATV,FRICV
(6(E24.16,','))
EIDV=1448
XV=1.083333333333333
*GET,PV,ELEM,1448,ETAB,CPRES
*GET,PENV,ELEM,1448,ETAB,PENE
*GET,STATV,ELEM,1448,ETAB,CSTAT
*GET,FRICV,ELEM,1448,ETAB,CSFRIC
*VWRITE,EIDV,XV,PV,PENV,STATV,FRICV
(6(E24.16,','))
EIDV=1449
XV=1.25
*GET,PV,ELEM,1449,ETAB,CPRES
*GET,PENV,ELEM,1449,ETAB,PENE
*GET,STATV,ELEM,1449,ETAB,CSTAT
*GET,FRICV,ELEM,1449,ETAB,CSFRIC
*VWRITE,EIDV,XV,PV,PENV,STATV,FRICV
(6(E24.16,','))
EIDV=1450
XV=1.416666666666667
*GET,PV,ELEM,1450,ETAB,CPRES
*GET,PENV,ELEM,1450,ETAB,PENE
*GET,STATV,ELEM,1450,ETAB,CSTAT
*GET,FRICV,ELEM,1450,ETAB,CSFRIC
*VWRITE,EIDV,XV,PV,PENV,STATV,FRICV
(6(E24.16,','))
EIDV=1451
XV=1.583333333333333
*GET,PV,ELEM,1451,ETAB,CPRES
*GET,PENV,ELEM,1451,ETAB,PENE
*GET,STATV,ELEM,1451,ETAB,CSTAT
*GET,FRICV,ELEM,1451,ETAB,CSFRIC
*VWRITE,EIDV,XV,PV,PENV,STATV,FRICV
(6(E24.16,','))
EIDV=1452
XV=1.75
*GET,PV,ELEM,1452,ETAB,CPRES
*GET,PENV,ELEM,1452,ETAB,PENE
*GET,STATV,ELEM,1452,ETAB,CSTAT
*GET,FRICV,ELEM,1452,ETAB,CSFRIC
*VWRITE,EIDV,XV,PV,PENV,STATV,FRICV
(6(E24.16,','))
EIDV=1453
XV=1.916666666666667
*GET,PV,ELEM,1453,ETAB,CPRES
*GET,PENV,ELEM,1453,ETAB,PENE
*GET,STATV,ELEM,1453,ETAB,CSTAT
*GET,FRICV,ELEM,1453,ETAB,CSFRIC
*VWRITE,EIDV,XV,PV,PENV,STATV,FRICV
(6(E24.16,','))
EIDV=1454
XV=2.083333333333333
*GET,PV,ELEM,1454,ETAB,CPRES
*GET,PENV,ELEM,1454,ETAB,PENE
*GET,STATV,ELEM,1454,ETAB,CSTAT
*GET,FRICV,ELEM,1454,ETAB,CSFRIC
*VWRITE,EIDV,XV,PV,PENV,STATV,FRICV
(6(E24.16,','))
EIDV=1455
XV=2.25
*GET,PV,ELEM,1455,ETAB,CPRES
*GET,PENV,ELEM,1455,ETAB,PENE
*GET,STATV,ELEM,1455,ETAB,CSTAT
*GET,FRICV,ELEM,1455,ETAB,CSFRIC
*VWRITE,EIDV,XV,PV,PENV,STATV,FRICV
(6(E24.16,','))
EIDV=1456
XV=2.416666666666667
*GET,PV,ELEM,1456,ETAB,CPRES
*GET,PENV,ELEM,1456,ETAB,PENE
*GET,STATV,ELEM,1456,ETAB,CSTAT
*GET,FRICV,ELEM,1456,ETAB,CSFRIC
*VWRITE,EIDV,XV,PV,PENV,STATV,FRICV
(6(E24.16,','))
EIDV=1457
XV=2.583333333333333
*GET,PV,ELEM,1457,ETAB,CPRES
*GET,PENV,ELEM,1457,ETAB,PENE
*GET,STATV,ELEM,1457,ETAB,CSTAT
*GET,FRICV,ELEM,1457,ETAB,CSFRIC
*VWRITE,EIDV,XV,PV,PENV,STATV,FRICV
(6(E24.16,','))
EIDV=1458
XV=2.75
*GET,PV,ELEM,1458,ETAB,CPRES
*GET,PENV,ELEM,1458,ETAB,PENE
*GET,STATV,ELEM,1458,ETAB,CSTAT
*GET,FRICV,ELEM,1458,ETAB,CSFRIC
*VWRITE,EIDV,XV,PV,PENV,STATV,FRICV
(6(E24.16,','))
EIDV=1459
XV=2.916666666666667
*GET,PV,ELEM,1459,ETAB,CPRES
*GET,PENV,ELEM,1459,ETAB,PENE
*GET,STATV,ELEM,1459,ETAB,CSTAT
*GET,FRICV,ELEM,1459,ETAB,CSFRIC
*VWRITE,EIDV,XV,PV,PENV,STATV,FRICV
(6(E24.16,','))
EIDV=1460
XV=3.083333333333333
*GET,PV,ELEM,1460,ETAB,CPRES
*GET,PENV,ELEM,1460,ETAB,PENE
*GET,STATV,ELEM,1460,ETAB,CSTAT
*GET,FRICV,ELEM,1460,ETAB,CSFRIC
*VWRITE,EIDV,XV,PV,PENV,STATV,FRICV
(6(E24.16,','))
EIDV=1461
XV=3.25
*GET,PV,ELEM,1461,ETAB,CPRES
*GET,PENV,ELEM,1461,ETAB,PENE
*GET,STATV,ELEM,1461,ETAB,CSTAT
*GET,FRICV,ELEM,1461,ETAB,CSFRIC
*VWRITE,EIDV,XV,PV,PENV,STATV,FRICV
(6(E24.16,','))
EIDV=1462
XV=3.416666666666667
*GET,PV,ELEM,1462,ETAB,CPRES
*GET,PENV,ELEM,1462,ETAB,PENE
*GET,STATV,ELEM,1462,ETAB,CSTAT
*GET,FRICV,ELEM,1462,ETAB,CSFRIC
*VWRITE,EIDV,XV,PV,PENV,STATV,FRICV
(6(E24.16,','))
EIDV=1463
XV=3.583333333333333
*GET,PV,ELEM,1463,ETAB,CPRES
*GET,PENV,ELEM,1463,ETAB,PENE
*GET,STATV,ELEM,1463,ETAB,CSTAT
*GET,FRICV,ELEM,1463,ETAB,CSFRIC
*VWRITE,EIDV,XV,PV,PENV,STATV,FRICV
(6(E24.16,','))
EIDV=1464
XV=3.75
*GET,PV,ELEM,1464,ETAB,CPRES
*GET,PENV,ELEM,1464,ETAB,PENE
*GET,STATV,ELEM,1464,ETAB,CSTAT
*GET,FRICV,ELEM,1464,ETAB,CSFRIC
*VWRITE,EIDV,XV,PV,PENV,STATV,FRICV
(6(E24.16,','))
EIDV=1465
XV=3.916666666666667
*GET,PV,ELEM,1465,ETAB,CPRES
*GET,PENV,ELEM,1465,ETAB,PENE
*GET,STATV,ELEM,1465,ETAB,CSTAT
*GET,FRICV,ELEM,1465,ETAB,CSFRIC
*VWRITE,EIDV,XV,PV,PENV,STATV,FRICV
(6(E24.16,','))
EIDV=1466
XV=4.083333333333333
*GET,PV,ELEM,1466,ETAB,CPRES
*GET,PENV,ELEM,1466,ETAB,PENE
*GET,STATV,ELEM,1466,ETAB,CSTAT
*GET,FRICV,ELEM,1466,ETAB,CSFRIC
*VWRITE,EIDV,XV,PV,PENV,STATV,FRICV
(6(E24.16,','))
EIDV=1467
XV=4.25
*GET,PV,ELEM,1467,ETAB,CPRES
*GET,PENV,ELEM,1467,ETAB,PENE
*GET,STATV,ELEM,1467,ETAB,CSTAT
*GET,FRICV,ELEM,1467,ETAB,CSFRIC
*VWRITE,EIDV,XV,PV,PENV,STATV,FRICV
(6(E24.16,','))
EIDV=1468
XV=4.416666666666667
*GET,PV,ELEM,1468,ETAB,CPRES
*GET,PENV,ELEM,1468,ETAB,PENE
*GET,STATV,ELEM,1468,ETAB,CSTAT
*GET,FRICV,ELEM,1468,ETAB,CSFRIC
*VWRITE,EIDV,XV,PV,PENV,STATV,FRICV
(6(E24.16,','))
EIDV=1469
XV=4.583333333333333
*GET,PV,ELEM,1469,ETAB,CPRES
*GET,PENV,ELEM,1469,ETAB,PENE
*GET,STATV,ELEM,1469,ETAB,CSTAT
*GET,FRICV,ELEM,1469,ETAB,CSFRIC
*VWRITE,EIDV,XV,PV,PENV,STATV,FRICV
(6(E24.16,','))
EIDV=1470
XV=4.75
*GET,PV,ELEM,1470,ETAB,CPRES
*GET,PENV,ELEM,1470,ETAB,PENE
*GET,STATV,ELEM,1470,ETAB,CSTAT
*GET,FRICV,ELEM,1470,ETAB,CSFRIC
*VWRITE,EIDV,XV,PV,PENV,STATV,FRICV
(6(E24.16,','))
EIDV=1471
XV=4.916666666666667
*GET,PV,ELEM,1471,ETAB,CPRES
*GET,PENV,ELEM,1471,ETAB,PENE
*GET,STATV,ELEM,1471,ETAB,CSTAT
*GET,FRICV,ELEM,1471,ETAB,CSFRIC
*VWRITE,EIDV,XV,PV,PENV,STATV,FRICV
(6(E24.16,','))
EIDV=1472
XV=5.083333333333333
*GET,PV,ELEM,1472,ETAB,CPRES
*GET,PENV,ELEM,1472,ETAB,PENE
*GET,STATV,ELEM,1472,ETAB,CSTAT
*GET,FRICV,ELEM,1472,ETAB,CSFRIC
*VWRITE,EIDV,XV,PV,PENV,STATV,FRICV
(6(E24.16,','))
EIDV=1473
XV=5.25
*GET,PV,ELEM,1473,ETAB,CPRES
*GET,PENV,ELEM,1473,ETAB,PENE
*GET,STATV,ELEM,1473,ETAB,CSTAT
*GET,FRICV,ELEM,1473,ETAB,CSFRIC
*VWRITE,EIDV,XV,PV,PENV,STATV,FRICV
(6(E24.16,','))
EIDV=1474
XV=5.416666666666667
*GET,PV,ELEM,1474,ETAB,CPRES
*GET,PENV,ELEM,1474,ETAB,PENE
*GET,STATV,ELEM,1474,ETAB,CSTAT
*GET,FRICV,ELEM,1474,ETAB,CSFRIC
*VWRITE,EIDV,XV,PV,PENV,STATV,FRICV
(6(E24.16,','))
EIDV=1475
XV=5.583333333333333
*GET,PV,ELEM,1475,ETAB,CPRES
*GET,PENV,ELEM,1475,ETAB,PENE
*GET,STATV,ELEM,1475,ETAB,CSTAT
*GET,FRICV,ELEM,1475,ETAB,CSFRIC
*VWRITE,EIDV,XV,PV,PENV,STATV,FRICV
(6(E24.16,','))
EIDV=1476
XV=5.75
*GET,PV,ELEM,1476,ETAB,CPRES
*GET,PENV,ELEM,1476,ETAB,PENE
*GET,STATV,ELEM,1476,ETAB,CSTAT
*GET,FRICV,ELEM,1476,ETAB,CSFRIC
*VWRITE,EIDV,XV,PV,PENV,STATV,FRICV
(6(E24.16,','))
EIDV=1477
XV=5.916666666666667
*GET,PV,ELEM,1477,ETAB,CPRES
*GET,PENV,ELEM,1477,ETAB,PENE
*GET,STATV,ELEM,1477,ETAB,CSTAT
*GET,FRICV,ELEM,1477,ETAB,CSFRIC
*VWRITE,EIDV,XV,PV,PENV,STATV,FRICV
(6(E24.16,','))
EIDV=1478
XV=6.083333333333333
*GET,PV,ELEM,1478,ETAB,CPRES
*GET,PENV,ELEM,1478,ETAB,PENE
*GET,STATV,ELEM,1478,ETAB,CSTAT
*GET,FRICV,ELEM,1478,ETAB,CSFRIC
*VWRITE,EIDV,XV,PV,PENV,STATV,FRICV
(6(E24.16,','))
EIDV=1479
XV=6.25
*GET,PV,ELEM,1479,ETAB,CPRES
*GET,PENV,ELEM,1479,ETAB,PENE
*GET,STATV,ELEM,1479,ETAB,CSTAT
*GET,FRICV,ELEM,1479,ETAB,CSFRIC
*VWRITE,EIDV,XV,PV,PENV,STATV,FRICV
(6(E24.16,','))
EIDV=1480
XV=6.416666666666667
*GET,PV,ELEM,1480,ETAB,CPRES
*GET,PENV,ELEM,1480,ETAB,PENE
*GET,STATV,ELEM,1480,ETAB,CSTAT
*GET,FRICV,ELEM,1480,ETAB,CSFRIC
*VWRITE,EIDV,XV,PV,PENV,STATV,FRICV
(6(E24.16,','))
EIDV=1481
XV=6.583333333333333
*GET,PV,ELEM,1481,ETAB,CPRES
*GET,PENV,ELEM,1481,ETAB,PENE
*GET,STATV,ELEM,1481,ETAB,CSTAT
*GET,FRICV,ELEM,1481,ETAB,CSFRIC
*VWRITE,EIDV,XV,PV,PENV,STATV,FRICV
(6(E24.16,','))
EIDV=1482
XV=6.75
*GET,PV,ELEM,1482,ETAB,CPRES
*GET,PENV,ELEM,1482,ETAB,PENE
*GET,STATV,ELEM,1482,ETAB,CSTAT
*GET,FRICV,ELEM,1482,ETAB,CSFRIC
*VWRITE,EIDV,XV,PV,PENV,STATV,FRICV
(6(E24.16,','))
EIDV=1483
XV=6.916666666666667
*GET,PV,ELEM,1483,ETAB,CPRES
*GET,PENV,ELEM,1483,ETAB,PENE
*GET,STATV,ELEM,1483,ETAB,CSTAT
*GET,FRICV,ELEM,1483,ETAB,CSFRIC
*VWRITE,EIDV,XV,PV,PENV,STATV,FRICV
(6(E24.16,','))
EIDV=1484
XV=7.083333333333333
*GET,PV,ELEM,1484,ETAB,CPRES
*GET,PENV,ELEM,1484,ETAB,PENE
*GET,STATV,ELEM,1484,ETAB,CSTAT
*GET,FRICV,ELEM,1484,ETAB,CSFRIC
*VWRITE,EIDV,XV,PV,PENV,STATV,FRICV
(6(E24.16,','))
EIDV=1485
XV=7.25
*GET,PV,ELEM,1485,ETAB,CPRES
*GET,PENV,ELEM,1485,ETAB,PENE
*GET,STATV,ELEM,1485,ETAB,CSTAT
*GET,FRICV,ELEM,1485,ETAB,CSFRIC
*VWRITE,EIDV,XV,PV,PENV,STATV,FRICV
(6(E24.16,','))
EIDV=1486
XV=7.416666666666667
*GET,PV,ELEM,1486,ETAB,CPRES
*GET,PENV,ELEM,1486,ETAB,PENE
*GET,STATV,ELEM,1486,ETAB,CSTAT
*GET,FRICV,ELEM,1486,ETAB,CSFRIC
*VWRITE,EIDV,XV,PV,PENV,STATV,FRICV
(6(E24.16,','))
EIDV=1487
XV=7.583333333333333
*GET,PV,ELEM,1487,ETAB,CPRES
*GET,PENV,ELEM,1487,ETAB,PENE
*GET,STATV,ELEM,1487,ETAB,CSTAT
*GET,FRICV,ELEM,1487,ETAB,CSFRIC
*VWRITE,EIDV,XV,PV,PENV,STATV,FRICV
(6(E24.16,','))
EIDV=1488
XV=7.75
*GET,PV,ELEM,1488,ETAB,CPRES
*GET,PENV,ELEM,1488,ETAB,PENE
*GET,STATV,ELEM,1488,ETAB,CSTAT
*GET,FRICV,ELEM,1488,ETAB,CSFRIC
*VWRITE,EIDV,XV,PV,PENV,STATV,FRICV
(6(E24.16,','))
EIDV=1489
XV=7.916666666666667
*GET,PV,ELEM,1489,ETAB,CPRES
*GET,PENV,ELEM,1489,ETAB,PENE
*GET,STATV,ELEM,1489,ETAB,CSTAT
*GET,FRICV,ELEM,1489,ETAB,CSFRIC
*VWRITE,EIDV,XV,PV,PENV,STATV,FRICV
(6(E24.16,','))
EIDV=1490
XV=8.083333333333334
*GET,PV,ELEM,1490,ETAB,CPRES
*GET,PENV,ELEM,1490,ETAB,PENE
*GET,STATV,ELEM,1490,ETAB,CSTAT
*GET,FRICV,ELEM,1490,ETAB,CSFRIC
*VWRITE,EIDV,XV,PV,PENV,STATV,FRICV
(6(E24.16,','))
EIDV=1491
XV=8.25
*GET,PV,ELEM,1491,ETAB,CPRES
*GET,PENV,ELEM,1491,ETAB,PENE
*GET,STATV,ELEM,1491,ETAB,CSTAT
*GET,FRICV,ELEM,1491,ETAB,CSFRIC
*VWRITE,EIDV,XV,PV,PENV,STATV,FRICV
(6(E24.16,','))
EIDV=1492
XV=8.416666666666666
*GET,PV,ELEM,1492,ETAB,CPRES
*GET,PENV,ELEM,1492,ETAB,PENE
*GET,STATV,ELEM,1492,ETAB,CSTAT
*GET,FRICV,ELEM,1492,ETAB,CSFRIC
*VWRITE,EIDV,XV,PV,PENV,STATV,FRICV
(6(E24.16,','))
EIDV=1493
XV=8.583333333333334
*GET,PV,ELEM,1493,ETAB,CPRES
*GET,PENV,ELEM,1493,ETAB,PENE
*GET,STATV,ELEM,1493,ETAB,CSTAT
*GET,FRICV,ELEM,1493,ETAB,CSFRIC
*VWRITE,EIDV,XV,PV,PENV,STATV,FRICV
(6(E24.16,','))
EIDV=1494
XV=8.75
*GET,PV,ELEM,1494,ETAB,CPRES
*GET,PENV,ELEM,1494,ETAB,PENE
*GET,STATV,ELEM,1494,ETAB,CSTAT
*GET,FRICV,ELEM,1494,ETAB,CSFRIC
*VWRITE,EIDV,XV,PV,PENV,STATV,FRICV
(6(E24.16,','))
EIDV=1495
XV=8.916666666666666
*GET,PV,ELEM,1495,ETAB,CPRES
*GET,PENV,ELEM,1495,ETAB,PENE
*GET,STATV,ELEM,1495,ETAB,CSTAT
*GET,FRICV,ELEM,1495,ETAB,CSFRIC
*VWRITE,EIDV,XV,PV,PENV,STATV,FRICV
(6(E24.16,','))
EIDV=1496
XV=9.083333333333334
*GET,PV,ELEM,1496,ETAB,CPRES
*GET,PENV,ELEM,1496,ETAB,PENE
*GET,STATV,ELEM,1496,ETAB,CSTAT
*GET,FRICV,ELEM,1496,ETAB,CSFRIC
*VWRITE,EIDV,XV,PV,PENV,STATV,FRICV
(6(E24.16,','))
EIDV=1497
XV=9.25
*GET,PV,ELEM,1497,ETAB,CPRES
*GET,PENV,ELEM,1497,ETAB,PENE
*GET,STATV,ELEM,1497,ETAB,CSTAT
*GET,FRICV,ELEM,1497,ETAB,CSFRIC
*VWRITE,EIDV,XV,PV,PENV,STATV,FRICV
(6(E24.16,','))
EIDV=1498
XV=9.416666666666666
*GET,PV,ELEM,1498,ETAB,CPRES
*GET,PENV,ELEM,1498,ETAB,PENE
*GET,STATV,ELEM,1498,ETAB,CSTAT
*GET,FRICV,ELEM,1498,ETAB,CSFRIC
*VWRITE,EIDV,XV,PV,PENV,STATV,FRICV
(6(E24.16,','))
EIDV=1499
XV=9.583333333333334
*GET,PV,ELEM,1499,ETAB,CPRES
*GET,PENV,ELEM,1499,ETAB,PENE
*GET,STATV,ELEM,1499,ETAB,CSTAT
*GET,FRICV,ELEM,1499,ETAB,CSFRIC
*VWRITE,EIDV,XV,PV,PENV,STATV,FRICV
(6(E24.16,','))
EIDV=1500
XV=9.75
*GET,PV,ELEM,1500,ETAB,CPRES
*GET,PENV,ELEM,1500,ETAB,PENE
*GET,STATV,ELEM,1500,ETAB,CSTAT
*GET,FRICV,ELEM,1500,ETAB,CSFRIC
*VWRITE,EIDV,XV,PV,PENV,STATV,FRICV
(6(E24.16,','))
EIDV=1501
XV=9.916666666666666
*GET,PV,ELEM,1501,ETAB,CPRES
*GET,PENV,ELEM,1501,ETAB,PENE
*GET,STATV,ELEM,1501,ETAB,CSTAT
*GET,FRICV,ELEM,1501,ETAB,CSFRIC
*VWRITE,EIDV,XV,PV,PENV,STATV,FRICV
(6(E24.16,','))
*CFCLOS
*CFOPEN,reaction,csv
RFY=0
*GET,RV,NODE,1,RF,FY
RFY=RFY+RV
*GET,RV,NODE,2,RF,FY
RFY=RFY+RV
*GET,RV,NODE,3,RF,FY
RFY=RFY+RV
*GET,RV,NODE,4,RF,FY
RFY=RFY+RV
*GET,RV,NODE,5,RF,FY
RFY=RFY+RV
*GET,RV,NODE,6,RF,FY
RFY=RFY+RV
*GET,RV,NODE,7,RF,FY
RFY=RFY+RV
*GET,RV,NODE,8,RF,FY
RFY=RFY+RV
*GET,RV,NODE,9,RF,FY
RFY=RFY+RV
*GET,RV,NODE,10,RF,FY
RFY=RFY+RV
*GET,RV,NODE,11,RF,FY
RFY=RFY+RV
*GET,RV,NODE,12,RF,FY
RFY=RFY+RV
*GET,RV,NODE,13,RF,FY
RFY=RFY+RV
*GET,RV,NODE,14,RF,FY
RFY=RFY+RV
*GET,RV,NODE,15,RF,FY
RFY=RFY+RV
*GET,RV,NODE,16,RF,FY
RFY=RFY+RV
*GET,RV,NODE,17,RF,FY
RFY=RFY+RV
*GET,RV,NODE,18,RF,FY
RFY=RFY+RV
*GET,RV,NODE,19,RF,FY
RFY=RFY+RV
*GET,RV,NODE,20,RF,FY
RFY=RFY+RV
*GET,RV,NODE,21,RF,FY
RFY=RFY+RV
*GET,RV,NODE,22,RF,FY
RFY=RFY+RV
*GET,RV,NODE,23,RF,FY
RFY=RFY+RV
*GET,RV,NODE,24,RF,FY
RFY=RFY+RV
*GET,RV,NODE,25,RF,FY
RFY=RFY+RV
*GET,RV,NODE,26,RF,FY
RFY=RFY+RV
*GET,RV,NODE,27,RF,FY
RFY=RFY+RV
*GET,RV,NODE,28,RF,FY
RFY=RFY+RV
*GET,RV,NODE,29,RF,FY
RFY=RFY+RV
*GET,RV,NODE,30,RF,FY
RFY=RFY+RV
*GET,RV,NODE,31,RF,FY
RFY=RFY+RV
*GET,RV,NODE,32,RF,FY
RFY=RFY+RV
*GET,RV,NODE,33,RF,FY
RFY=RFY+RV
*GET,RV,NODE,34,RF,FY
RFY=RFY+RV
*GET,RV,NODE,35,RF,FY
RFY=RFY+RV
*GET,RV,NODE,36,RF,FY
RFY=RFY+RV
*GET,RV,NODE,37,RF,FY
RFY=RFY+RV
*GET,RV,NODE,38,RF,FY
RFY=RFY+RV
*GET,RV,NODE,39,RF,FY
RFY=RFY+RV
*GET,RV,NODE,40,RF,FY
RFY=RFY+RV
*GET,RV,NODE,41,RF,FY
RFY=RFY+RV
*GET,RV,NODE,42,RF,FY
RFY=RFY+RV
*GET,RV,NODE,43,RF,FY
RFY=RFY+RV
*GET,RV,NODE,44,RF,FY
RFY=RFY+RV
*GET,RV,NODE,45,RF,FY
RFY=RFY+RV
*GET,RV,NODE,46,RF,FY
RFY=RFY+RV
*GET,RV,NODE,47,RF,FY
RFY=RFY+RV
*GET,RV,NODE,48,RF,FY
RFY=RFY+RV
*GET,RV,NODE,49,RF,FY
RFY=RFY+RV
*GET,RV,NODE,50,RF,FY
RFY=RFY+RV
*GET,RV,NODE,51,RF,FY
RFY=RFY+RV
*GET,RV,NODE,52,RF,FY
RFY=RFY+RV
*GET,RV,NODE,53,RF,FY
RFY=RFY+RV
*GET,RV,NODE,54,RF,FY
RFY=RFY+RV
*GET,RV,NODE,55,RF,FY
RFY=RFY+RV
*GET,RV,NODE,56,RF,FY
RFY=RFY+RV
*GET,RV,NODE,57,RF,FY
RFY=RFY+RV
*GET,RV,NODE,58,RF,FY
RFY=RFY+RV
*GET,RV,NODE,59,RF,FY
RFY=RFY+RV
*GET,RV,NODE,60,RF,FY
RFY=RFY+RV
*GET,RV,NODE,61,RF,FY
RFY=RFY+RV
*VWRITE,RFY
(E24.16)
*CFCLOS
FINISH
/EXIT,NOSAVE
