/BATCH
/FILNAME,structural
/PREP7
ET,1,185
MP,EX,1,2000.0
MP,PRXY,1,0.3
MP,ALPX,1,1e-05
TREF,20
N,1,0,0,0
N,2,10,0,0
N,3,10,1,0
N,4,0,1,0
N,5,0,0,1
N,6,10,0,1
N,7,10,1,1
N,8,0,1,1
E,1,2,3,4,5,6,7,8
NSEL,S,LOC,X,0
D,ALL,UX,0
NSEL,S,LOC,Y,0
D,ALL,UY,0
NSEL,S,LOC,Z,0
D,ALL,UZ,0
ALLSEL,ALL
CP,1,UX,2,3,6,7
N,9,10.002,0,0
D,9,ALL,0
ET,2,178
KEYOPT,2,2,4
KEYOPT,2,5,1
R,2
RMODIF,2,9,-1e-9,-1e-9
TYPE,2
REAL,2
E,2,9
ALLSEL,ALL
FINISH
/SOLU
ANTYPE,STATIC
NLGEOM,OFF
OUTRES,ALL,ALL
AUTOTS,OFF
KBC,0
TIME,1.0
NSUBST,10,10,10
BF,ALL,TEMP,30.0
SOLVE
TIME,2.0
NSUBST,10,10,10
BF,ALL,TEMP,80.0
SOLVE
TIME,3.0
NSUBST,10,10,10
BF,ALL,TEMP,20.0
SOLVE
FINISH
/POST1
*CFOPEN,values,csv
SET,,,,,1.0
ALLSEL,ALL
*GET,UXV,NODE,2,U,X
*GET,UYV,NODE,3,U,Y
*GET,UZV,NODE,6,U,Z
ETABLE,SXV,S,X
*GET,SXX,ELEM,1,ETAB,SXV
RFV=0
*GET,R1,NODE,1,RF,FX
*GET,R4,NODE,4,RF,FX
*GET,R5,NODE,5,RF,FX
*GET,R8,NODE,8,RF,FX
RFV=R1+R4+R5+R8
CFV=0
STATV=0
GAPV=0
ETABLE,CFOR,SMISC,1
ETABLE,CSTAT,NMISC,1
ETABLE,CGAP,NMISC,3
*GET,CFV,ELEM,2,ETAB,CFOR
*GET,STATV,ELEM,2,ETAB,CSTAT
*GET,GAPV,ELEM,2,ETAB,CGAP
TV=1.0
*VWRITE,TV,UXV,UYV,UZV,SXX,RFV,CFV,STATV,GAPV
(9(E23.15,','))
SET,,,,,2.0
ALLSEL,ALL
*GET,UXV,NODE,2,U,X
*GET,UYV,NODE,3,U,Y
*GET,UZV,NODE,6,U,Z
ETABLE,SXV,S,X
*GET,SXX,ELEM,1,ETAB,SXV
RFV=0
*GET,R1,NODE,1,RF,FX
*GET,R4,NODE,4,RF,FX
*GET,R5,NODE,5,RF,FX
*GET,R8,NODE,8,RF,FX
RFV=R1+R4+R5+R8
CFV=0
STATV=0
GAPV=0
ETABLE,CFOR,SMISC,1
ETABLE,CSTAT,NMISC,1
ETABLE,CGAP,NMISC,3
*GET,CFV,ELEM,2,ETAB,CFOR
*GET,STATV,ELEM,2,ETAB,CSTAT
*GET,GAPV,ELEM,2,ETAB,CGAP
TV=2.0
*VWRITE,TV,UXV,UYV,UZV,SXX,RFV,CFV,STATV,GAPV
(9(E23.15,','))
SET,,,,,3.0
ALLSEL,ALL
*GET,UXV,NODE,2,U,X
*GET,UYV,NODE,3,U,Y
*GET,UZV,NODE,6,U,Z
ETABLE,SXV,S,X
*GET,SXX,ELEM,1,ETAB,SXV
RFV=0
*GET,R1,NODE,1,RF,FX
*GET,R4,NODE,4,RF,FX
*GET,R5,NODE,5,RF,FX
*GET,R8,NODE,8,RF,FX
RFV=R1+R4+R5+R8
CFV=0
STATV=0
GAPV=0
ETABLE,CFOR,SMISC,1
ETABLE,CSTAT,NMISC,1
ETABLE,CGAP,NMISC,3
*GET,CFV,ELEM,2,ETAB,CFOR
*GET,STATV,ELEM,2,ETAB,CSTAT
*GET,GAPV,ELEM,2,ETAB,CGAP
TV=3.0
*VWRITE,TV,UXV,UYV,UZV,SXX,RFV,CFV,STATV,GAPV
(9(E23.15,','))
*CFCLOS
FINISH
/EXIT,NOSAVE
