/BATCH
/FILNAME,structural
/PREP7
ET,1,185
MP,EX,1,1691.594
MP,PRXY,1,0.35
MP,ALPX,1,1e-05
TREF,20
N,1,0,0,0
N,2,10,0,0
N,3,10,1,0
N,4,0,1,0
N,5,0,0,1
N,6,10,0,1
N,7,10,1,1
N,8,0,1,1
E,1,2,3,4,5,6,7,8
NSEL,S,LOC,X,0
D,ALL,UX,0
NSEL,S,LOC,Y,0
D,ALL,UY,0
NSEL,S,LOC,Z,0
D,ALL,UZ,0
ALLSEL,ALL
CP,1,UX,2,3,6,7
TB,PRONY,1,,23,SHEAR
TBDATA,1,0.003681734506033953,1.176e-14
TBDATA,3,0.001067632067742023,1.228e-14
TBDATA,5,0.00464000227004825,2.878e-14
TBDATA,7,0.007537860739633741,1.701e-12
TBDATA,9,0.01232979071810375,9.178e-12
TBDATA,11,0.01838739082782275,6.034e-11
TBDATA,13,0.02693672358733833,6.187e-09
TBDATA,15,0.03785541920815515,1.102e-07
TBDATA,17,0.05467269332948686,1.047e-06
TBDATA,19,0.0803478848943659,6.903e-06
TBDATA,21,0.06708938433217426,2.582e-05
TBDATA,23,0.07582552314562477,5.363e-05
TBDATA,25,0.1025482473926959,0.0001838
TBDATA,27,0.05521005631374904,0.0004386
TBDATA,29,0.0968341103125218,0.0007577
TBDATA,31,0.07939907566472806,0.001795
TBDATA,33,0.07050509755887051,0.002292
TBDATA,35,0.05946817025834805,0.006576
TBDATA,37,0.04760835046707425,0.00992
TBDATA,39,0.036429545150905,0.0329
TBDATA,41,0.02631127800169544,0.05374
TBDATA,43,0.01804747474866901,0.06586
TBDATA,45,0.01100145779661077,35.03
TB,PRONY,1,,23,BULK
TBDATA,1,0.003681734506033953,1.176e-14
TBDATA,3,0.001067632067742023,1.228e-14
TBDATA,5,0.00464000227004825,2.878e-14
TBDATA,7,0.007537860739633741,1.701e-12
TBDATA,9,0.01232979071810375,9.178e-12
TBDATA,11,0.01838739082782275,6.034e-11
TBDATA,13,0.02693672358733833,6.187e-09
TBDATA,15,0.03785541920815515,1.102e-07
TBDATA,17,0.05467269332948686,1.047e-06
TBDATA,19,0.0803478848943659,6.903e-06
TBDATA,21,0.06708938433217426,2.582e-05
TBDATA,23,0.07582552314562477,5.363e-05
TBDATA,25,0.1025482473926959,0.0001838
TBDATA,27,0.05521005631374904,0.0004386
TBDATA,29,0.0968341103125218,0.0007577
TBDATA,31,0.07939907566472806,0.001795
TBDATA,33,0.07050509755887051,0.002292
TBDATA,35,0.05946817025834805,0.006576
TBDATA,37,0.04760835046707425,0.00992
TBDATA,39,0.036429545150905,0.0329
TBDATA,41,0.02631127800169544,0.05374
TBDATA,43,0.01804747474866901,0.06586
TBDATA,45,0.01100145779661077,35.03
ALLSEL,ALL
FINISH
/SOLU
ANTYPE,STATIC
NLGEOM,OFF
OUTRES,ALL,ALL
AUTOTS,OFF
KBC,0
TREF,65
BF,ALL,TEMP,65
OUTRES,ALL,LAST
TIME,1.0
D,2,UX,0.01
DELTIM,0.0001,0.0001,0.0001
SOLVE
TIME,11.0
D,2,UX,0.01
DELTIM,0.1,0.1,0.1
SOLVE
TIME,31.0
D,2,UX,0.01
DELTIM,0.1,0.1,0.1
SOLVE
TIME,32.0
D,2,UX,0.0
DELTIM,0.0001,0.0001,0.0001
SOLVE
TIME,62.0
D,2,UX,0.0
DELTIM,0.1,0.1,0.1
SOLVE
FINISH
/POST1
*CFOPEN,values,csv
SET,,,,,1.0
ALLSEL,ALL
*GET,UXV,NODE,2,U,X
*GET,UYV,NODE,3,U,Y
*GET,UZV,NODE,6,U,Z
ETABLE,SXV,S,X
*GET,SXX,ELEM,1,ETAB,SXV
RFV=0
*GET,R1,NODE,1,RF,FX
*GET,R4,NODE,4,RF,FX
*GET,R5,NODE,5,RF,FX
*GET,R8,NODE,8,RF,FX
RFV=R1+R4+R5+R8
CFV=0
STATV=0
GAPV=0
TV=1.0
*VWRITE,TV,UXV,UYV,UZV,SXX,RFV,CFV,STATV,GAPV
(9(E23.15,','))
SET,,,,,11.0
ALLSEL,ALL
*GET,UXV,NODE,2,U,X
*GET,UYV,NODE,3,U,Y
*GET,UZV,NODE,6,U,Z
ETABLE,SXV,S,X
*GET,SXX,ELEM,1,ETAB,SXV
RFV=0
*GET,R1,NODE,1,RF,FX
*GET,R4,NODE,4,RF,FX
*GET,R5,NODE,5,RF,FX
*GET,R8,NODE,8,RF,FX
RFV=R1+R4+R5+R8
CFV=0
STATV=0
GAPV=0
TV=11.0
*VWRITE,TV,UXV,UYV,UZV,SXX,RFV,CFV,STATV,GAPV
(9(E23.15,','))
SET,,,,,31.0
ALLSEL,ALL
*GET,UXV,NODE,2,U,X
*GET,UYV,NODE,3,U,Y
*GET,UZV,NODE,6,U,Z
ETABLE,SXV,S,X
*GET,SXX,ELEM,1,ETAB,SXV
RFV=0
*GET,R1,NODE,1,RF,FX
*GET,R4,NODE,4,RF,FX
*GET,R5,NODE,5,RF,FX
*GET,R8,NODE,8,RF,FX
RFV=R1+R4+R5+R8
CFV=0
STATV=0
GAPV=0
TV=31.0
*VWRITE,TV,UXV,UYV,UZV,SXX,RFV,CFV,STATV,GAPV
(9(E23.15,','))
SET,,,,,32.0
ALLSEL,ALL
*GET,UXV,NODE,2,U,X
*GET,UYV,NODE,3,U,Y
*GET,UZV,NODE,6,U,Z
ETABLE,SXV,S,X
*GET,SXX,ELEM,1,ETAB,SXV
RFV=0
*GET,R1,NODE,1,RF,FX
*GET,R4,NODE,4,RF,FX
*GET,R5,NODE,5,RF,FX
*GET,R8,NODE,8,RF,FX
RFV=R1+R4+R5+R8
CFV=0
STATV=0
GAPV=0
TV=32.0
*VWRITE,TV,UXV,UYV,UZV,SXX,RFV,CFV,STATV,GAPV
(9(E23.15,','))
SET,,,,,62.0
ALLSEL,ALL
*GET,UXV,NODE,2,U,X
*GET,UYV,NODE,3,U,Y
*GET,UZV,NODE,6,U,Z
ETABLE,SXV,S,X
*GET,SXX,ELEM,1,ETAB,SXV
RFV=0
*GET,R1,NODE,1,RF,FX
*GET,R4,NODE,4,RF,FX
*GET,R5,NODE,5,RF,FX
*GET,R8,NODE,8,RF,FX
RFV=R1+R4+R5+R8
CFV=0
STATV=0
GAPV=0
TV=62.0
*VWRITE,TV,UXV,UYV,UZV,SXX,RFV,CFV,STATV,GAPV
(9(E23.15,','))
*CFCLOS
FINISH
/EXIT,NOSAVE
